# ----------------------------
# LAMMPS Input Script for Melting Bulk Ni
#
# This script simulates the melting of a bulk Ni sample.
# - The Ni unit cell (fcc) is replicated 10 times in each direction.
# - Initial velocities are assigned from a Maxwell-Boltzmann distribution at 600 K.
# - The simulation is run under NPT (isothermal-isobaric) conditions (target pressure ~1 atm)
#   while heating the system continuously from 300 K to 2500 K at a rate of 10 K/ps.
#
# The interatomic interactions are described by the EAM potential for Ni developed by
# Mishin et al. (1999) (v005, OpenKIM: doi:10.25950/a88dfc37).
#
# Note: In metal units, time is in ps, distance in Å, energy in eV, and pressure in GPa.
# 1 atm ≈ 0.0001013 GPa.
# ----------------------------

# Initialize simulation
units           metal
dimension       3
boundary        p p p
atom_style      atomic

# Define lattice and simulation box
# Using fcc lattice with lattice constant a = 3.52 Å (typical for Ni)
lattice         fcc 3.52
region          box block 0 10 0 10 0 10 units lattice
create_box      1 box
create_atoms    1 box

# Define atomic mass for Ni (g/mol)
mass            1 58.6934

# Set interatomic potential
# Use the cubic hermite tabulated EAM potential from Mishin et al. (1999)
# (Ensure the file Ni_Mishin_1999_v005.eam.alloy is in your working directory or provide a proper path)
pair_style      eam/cubic
pair_coeff      * * Ni_Mishin_1999_v005.eam.alloy Ni

# Set up neighbor list
neighbor        2.0 bin
neigh_modify    delay 10 every 1 check yes

# Initialize velocities from a Maxwell-Boltzmann distribution at 600 K
# (Note: The thermostat will rapidly adjust the system to 300 K at the start of the run.)
velocity        all create 600 12345 mom yes rot yes dist gaussian

# Define time step (in ps)
timestep        0.001

# Set up output settings
thermo          1000
thermo_style    custom step temp press pe ke etotal

# Dump atom positions (adjust dump frequency and file name as needed)
dump            1 all custom 1000 dump.melting.lammpstrj id type x y z

# Set up NPT integration with a temperature ramp from 300 K to 2500 K.
# The ramp is linear over the total run time.
# Temperature damping parameter: 0.1 ps; Pressure damping parameter: 1.0 ps.
# Target pressure: 1 atm = 0.0001013 GPa.
fix             1 all npt temp 300 2500 0.1 iso 0.0001013 0.0001013 1.0

# Run the simulation
# Heating from 300 K to 2500 K at 10 K/ps requires (2500-300)/10 = 220 ps.
# With dt = 0.001 ps, total steps = 220 ps / 0.001 ps = 220000 steps.
run             220000

# End of script
