units metal
dimension 3
boundary p p p
atom_style atomic
run_style verlet
lattice fcc 4.05
region box block 0 1 0 1 0 1 units lattice
create_box 1 box
create_atoms 1 box
replicate 5 5 5
mass 1 26.9815385
pair_style eam/alloy
pair_coeff * * ../../../potentials/prompt1.potential Al
neighbor 2 bin
neigh_modify delay 0 every 1 check yes
velocity all create 300 4928459 mom yes rot no dist gaussian
timestep 0.001
reset_timestep 0
thermo 1000
thermo_style custom step time temp press pe ke etotal enthalpy vol lx ly lz
fix 1 all npt temp 300 300 0.1 iso 1.01325 1.01325 1
run 500000
