units metal
dimension 3
boundary p p p
atom_style atomic
lattice fcc 4.05
region box block 0 5 0 5 0 5
create_box 1 box
create_atoms 1 box
mass 1 26.9815
pair_style eam/alloy
pair_coeff * * /home/holbrooe/LAMMPS-AST/EvaluationPipelineExample/potentials/prompt1.potential Al
timestep 0.001
velocity all create 300.0 12345 mom yes rot yes dist gaussian
fix 1 all npt temp 300.0 300.0 0.1 iso 1.0 1.0 1.0
thermo 1000
thermo_style custom step temp press pe ke etotal vol
run 10
