units metal
dimension 3
boundary p p p
atom_style atomic
timestep 0.001
run_style verlet
lattice fcc 4.05
region unitcell block 0 1 0 1 0 1 units lattice
create_box 1 unitcell
create_atoms 1 box
replicate 5 5 5
mass 1 26.9815385
pair_style eam/alloy
pair_coeff * * /home/holbrooe/LAMMPS-AST/EvaluationPipelineExample/potentials/prompt1.potential Al
neighbor 2.0 bin
neigh_modify every 1 delay 10 check yes
velocity all create 300.0 12345 mom yes rot no dist gaussian
thermo_style custom step time temp press pe ke etotal vol lx ly lz
thermo 1000
reset_timestep 0
fix 1 all npt temp 300.0 300.0 0.1 iso 1.01325 1.01325 1.0
run 10
