units metal
dimension 3
boundary p p p
atom_style atomic
run_style verlet
variable alat equal 3.52
variable tstart equal 300.0
variable tvelocity equal 600.0
variable tstop equal 2500.0
variable heating_rate equal 10.0
variable pressure_atm equal 1.01325
variable dt equal 0.001
variable tdamp equal 0.1
variable pdamp equal 1.0
variable seed equal 4928459
variable runtime equal (v_tstop-v_tstart)/v_heating_rate
variable nsteps equal floor((v_runtime/v_dt)+0.5)
lattice fcc ${alat}
region box block 0 1 0 1 0 1 units lattice
create_box 1 box
create_atoms 1 box
replicate 10 10 10
mass 1 58.6934
pair_style eam/alloy
pair_coeff * * /home/holbrooe/LAMMPS-AST/EvaluationPipelineExample/potentials/prompt2.potential Ni
neighbor 2.0 bin
neigh_modify delay 0 every 1 check yes
velocity all create ${tvelocity} ${seed} mom yes rot yes dist gaussian
timestep ${dt}
reset_timestep 0
thermo 1000
thermo_style custom step time temp press pe ke etotal enthalpy vol lx ly lz
thermo_modify flush yes
fix 1 all npt temp ${tstart} ${tstop} ${tdamp} iso ${pressure_atm} ${pressure_atm} ${pdamp}
run 10
