units metal
dimension 3
boundary p p p
atom_style atomic
run_style verlet
variable alat equal 3.52
variable tinit equal 600.0
variable tstart equal 300.0
variable tstop equal 2500.0
variable ptarget equal 1.01325
variable dt equal 0.001
variable tdamp equal 0.1
variable pdamp equal 1.0
variable seed equal 4928459
lattice fcc ${alat} orient x 1 0 0 orient y 0 1 0 orient z 0 0 1
region unitcell block 0 1 0 1 0 1 units lattice
create_box 1 unitcell
create_atoms 1 region unitcell
replicate 10 10 10
pair_style eam/alloy
pair_coeff * * /home/holbrooe/LAMMPS-AST/EvaluationPipelineExample/potentials/prompt2.potential Ni
neighbor 2.0 bin
neigh_modify delay 0 every 1 check yes
velocity all create ${tinit} ${seed} dist gaussian mom yes loop geom
timestep ${dt}
thermo 1000
thermo_style custom step temp press pe ke etotal vol lx ly lz
thermo_modify norm no flush yes
reset_timestep 0
fix 1 all npt temp ${tstart} ${tstop} ${tdamp} iso ${ptarget} ${ptarget} ${pdamp}
run 10
