units metal
dimension 3
boundary p p s
atom_style atomic
lattice bcc 3.308
region projectile block 0 20 0 20 0 20 units lattice
region target block 0 20 0 20 -41.5 -1.5 units lattice
region simbox block 0 20 0 20 -41.5 20 units lattice
create_box 2 simbox
create_atoms 1 region projectile
create_atoms 2 region target
mass 1 92.90638
mass 2 92.90638
pair_style eam/alloy
pair_coeff * * /home/holbrooe/LAMMPS-AST/EvaluationPipelineExample/potentials/prompt3.potential Nb Nb
neighbor 2.0 bin
neigh_modify every 1 delay 0 check yes
velocity all create 300.0 12345 dist gaussian
fix 1 all nvt temp 300.0 300.0 0.1
timestep 0.001
thermo 100
thermo_style custom step temp pe ke etotal press
run 10
group projectile region projectile
group target region target
velocity projectile set 0.0 0.0 -20.0 units box sum yes
fix 2 all nve
thermo 100
run 10
write_data final_spall.data
