# NPT equilibration of bulk fcc Al at 300 K, 1 atm
# EAM potential: Ercolessi & Adams (1994), OpenKIM v002

units           metal
atom_style      atomic
boundary        p p p

# fcc Al lattice (a0 = 4.032 Å, from potential header)
lattice         fcc 4.032
region          box block 0 5 0 5 0 5
create_box      1 box
create_atoms    1 box

mass            1 26.982

# EAM (Ercolessi & Adams) for Al
pair_style      eam/alloy
pair_coeff      * * Al.eam.alloy Al

# Initial velocities at 2x target T (gets halved by equipartition)
velocity        all create 600.0 12345 mom yes rot yes dist gaussian

# Output
thermo          100
thermo_style    custom step temp press pe ke etotal vol

# 1 fs timestep -> 500000 steps = 500 ps
timestep        0.001

# NPT: 300 K, 1 atm, taut = 0.1 ps, taup = 1.0 ps
fix             1 all npt temp 300.0 300.0 0.1 iso 1.0 1.0 1.0

run             500000

unfix           1
