# Bulk Ni melting via continuous heating, NPT 1 atm
# Mishin et al. 1999 EAM potential

units           metal
atom_style      atomic
boundary        p p p

# FCC Ni: lattice parameter ~3.52 Angstrom
lattice         fcc 3.52
region          box block 0 1 0 1 0 1
create_box      1 box
create_atoms    1 box

# 10x10x10 replication of the unit cell -> 4000 atoms
replicate       10 10 10

mass            1 58.6934

# Mishin 1999 EAM (setfl format from OpenKIM)
pair_style      eam/alloy
pair_coeff      * * Ni_Mishin_1999.eam.alloy Ni

# Maxwell-Boltzmann initial velocities at 600 K
velocity        all create 600.0 482793 mom yes rot yes dist gaussian

timestep        0.001

# Heat from 300 K to 2500 K at 10 K/ps -> 220 ps -> 220000 steps at 1 fs
# NPT: T-damp 0.1 ps, P-damp 1.0 ps, 1 atm = 1.01325 bar (use 1.0 bar in metal units)
fix             1 all npt temp 300.0 2500.0 0.1 iso 1.0 1.0 1.0

thermo          1000
thermo_style    custom step time temp press vol pe ke etotal density

run             220000
