# Spall failure of Nb single crystal under 2 km/s impact
# EAM (Fellinger et al., PRB 2010), metal units

units           metal
atom_style      atomic
boundary        p p s

# Lattice parameter for BCC Nb (Fellinger potential)
variable        a       equal 3.3079
variable        gap     equal 15.0          # 1.5 nm gap, in Angstroms
variable        gap_lat equal ${gap}/${a}   # gap in lattice units

lattice         bcc ${a} orient x 1 0 0 orient y 0 1 0 orient z 0 0 1

# Simulation box: x,y = 20 lattice units (periodic);
# z extended with vacuum so free surfaces don't poke out during shock
region          simbox block 0 20 0 20 -10 80 units lattice
create_box      1 simbox

# Target: 20 x 20 x 40 BCC cells along [001]
region          rtarget block 0 20 0 20 0 40 units lattice
create_atoms    1 region rtarget

# Projectile: 20 x 20 x 20 BCC cells, separated from target by gap (1.5 nm)
variable        pzlo equal 40+${gap_lat}
variable        pzhi equal ${pzlo}+20
region          rproj block 0 20 0 20 ${pzlo} ${pzhi} units lattice
create_atoms    1 region rproj

mass            1 92.90638

group           target region rtarget
group           proj   region rproj

pair_style      eam/alloy
pair_coeff      * * prompt3.potential Nb

# ---- Equilibration: NVT at 300 K for 100 ps (dt = 1 fs) ----
velocity        all create 300.0 12345 mom yes rot yes dist gaussian

timestep        0.001
fix             nvt_eq all nvt temp 300.0 300.0 0.1
thermo          1000
thermo_style    custom step temp pe ke etotal press
run             100000
unfix           nvt_eq

# ---- Apply impact velocity: 2 km/s = 20 Angstrom/ps in -z toward target ----
velocity        proj set 0.0 0.0 -20.0 sum yes units box

# ---- Adiabatic impact: NVE ----
fix             nve_imp all nve
thermo          100
thermo_style    custom step temp pe ke etotal press
run             100000
