units metal
dimension 3
boundary p p p
atom_style atomic
newton on
atom_modify map array
neighbor 2.0 bin
neigh_modify delay 0 every 1 check yes
run_style verlet

variable a equal 3.52
variable seed equal 4928459
variable tinit equal 600.0
variable tstart equal 300.0
variable tstop equal 2500.0
variable ptarget equal 1.01325
variable dt equal 0.001
variable tdamp equal 0.1
variable pdamp equal 1.0
variable nsteps equal 220000

lattice fcc ${a} orient x 1 0 0 orient y 0 1 0 orient z 0 0 1
region ucell block 0 1 0 1 0 1 units lattice
create_box 1 ucell
create_atoms 1 box
replicate 10 10 10
mass 1 58.6934

pair_style eam/alloy
pair_coeff * * ../../../potentials/prompt1.potential Ni

velocity all create ${tinit} ${seed} mom yes rot no dist gaussian

timestep ${dt}
thermo 1000
thermo_style custom step time temp press pe ke etotal enthalpy vol density lx ly lz
thermo_modify flush yes

fix 1 all npt temp ${tstart} ${tstop} ${tdamp} iso ${ptarget} ${ptarget} ${pdamp}

reset_timestep 0
run ${nsteps}

unfix 1
