units metal
dimension 3
boundary p p p
atom_style atomic
lattice fcc 1
region box block 0 5 0 5 0 5 units lattice
create_box 1 box
create_atoms 1 box
pair_style eam/alloy
pair_coeff * * ../../../potentials/prompt1.potential Al
neighbor 2 bin
neigh_modify delay 0 every 1 check yes
timestep 1
velocity all create 300 12345 mom yes rot no dist gaussian
fix 1 all npt temp 300 300 0.1 iso 1.01325 1.01325 1
run 500
