units metal
atom_style atomic
boundary p p p
lattice fcc 3.52
region box block 0 10 0 10 0 10
create_box 1 box
create_atoms 1 box
pair_style eam/alloy
pair_coeff * * ../../../potentials/prompt1.potential Ni
neighbor 2 bin
neigh_modify every 1 delay 0 check yes
velocity all create 600 12345 mom yes rot yes dist gaussian
fix 1 all npt temp 300 2500 5 iso 1.01325 1.01325 5
timestep 0.001
run 2200
