units metal
dimension 3
boundary p p p
atom_style atomic
lattice fcc 3.52 orient x 1 0 0 orient y 0 1 0 orient z 0 0 1
region box block 0 10 0 10 0 10
create_box 1 box
create_atoms 1 box
pair_style eam
pair_coeff * * ../../../potentials/prompt1.potential Ni
velocity all create 600 12345 mom yes rot yes dist gaussian
fix 1 all npt temp 300 2500 10 iso 1 1 1
timestep 0.001
run 220000
