units metal
atom_style atomic
boundary p p f
lattice bcc 3.3
region projectile block 0 20 0 20 0 20
region target block 0 20 0 20 21.5 61.5
region whole union 2 projectile target
create_box 1 whole
create_atoms 1 region projectile
create_atoms 1 region target
pair_style eam
pair_coeff * * ../../../potentials/prompt1.potential Nb
mass 1 92.906
velocity all create 300 12345 mom yes rot no dist gaussian
fix equil all nvt temp 300 300 0.1
timestep 0.001
run 100000
unfix equil
group projectile region projectile
velocity projectile add 0 0 2000
fix nve all nve
run 200000
