units metal
dimension 3
boundary p p m
atom_style atomic
neighbor 2 bin
neigh_modify every 1 delay 0 check yes
run_style verlet
region whole block 0 66 0 66 -50 263 units box
create_box 2 whole
lattice bcc 3.3 origin 0 0 0 orient x 1 0 0 orient y 0 1 0 orient z 0 0 1
region target block 0 19.999999 0 19.999999 0 39.999999 units lattice
region projectile0 block 0 19.999999 0 19.999999 40 59.999999 units lattice
create_atoms 1 region target
create_atoms 2 region projectile0
group target type 1
group projectile type 2
mass 1 92.90638
mass 2 92.90638
pair_style eam/fs
pair_coeff * * ../../../potentials/prompt1.potential Nb Nb
timestep 0.001
thermo 1000
thermo_style custom step time temp pe ke etotal lx ly lz atoms
thermo_modify flush yes norm no
velocity all create 300 123456 mom yes rot no dist gaussian
dump d1 all custom 1000 equilibration.lammpstrj id type x y z vx vy vz
dump_modify d1 sort id
fix f1 all nvt temp 300 300 0.1
run 100000
reset_timestep 0
velocity target zero linear
velocity projectile zero linear
velocity projectile set NULL NULL -20 sum yes units box
dump d2 all custom 1000 impact.lammpstrj id type x y z vx vy vz fx fy fz
dump_modify d2 sort id
fix f2 all nve
run 100000
