units metal
dimension 3
boundary p p s
atom_style atomic
newton on
neighbor 2 bin
neigh_modify delay 0 every 1 check yes
region whole block 0 66 0 66 0 213 units box
create_box 1 whole
lattice bcc 3.3 orient x 1 0 0 orient y 0 1 0 orient z 0 0 1
region target block 0 66 0 66 0 132 units box
region projectile block 0 66 0 66 147 213 units box
create_atoms 1 region target
create_atoms 1 region projectile
mass 1 92.90638
pair_style eam/alloy
pair_coeff * * ../../../potentials/prompt1.potential Nb
timestep 0.001
thermo_style custom step time temp press pe ke etotal
thermo 1000
group target region target
group projectile region projectile
velocity all create 300 12345 mom yes rot yes dist gaussian
fix eq all nvt temp 300 300 0.1
run 100000
unfix eq
velocity projectile add 0 0 -20 units box
fix int all nve
run 200000
