clear
units metal
dimension 3
boundary p p f
atom_style atomic
lattice bcc 3.3 orient x 1 0 0 orient y 0 1 0 orient z 0 0 1
region whole block 0 66 0 66 0 213 units box
create_box 1 whole
region target block 0 66 0 66 0 132 units box
region projectile block 0 66 0 66 147 213 units box
create_atoms 1 region target
create_atoms 1 region projectile
group target region target
group projectile region projectile
pair_style eam/alloy
pair_coeff * * ../../../potentials/prompt1.potential Nb
neighbor 2 bin
neigh_modify delay 0 every 1 check yes
timestep 0.001
thermo 1000
thermo_style custom step time temp press pe ke etotal
velocity target create 300 12345 mom yes rot yes dist gaussian
velocity projectile create 300 67890 mom yes rot yes dist gaussian
fix ft target nvt temp 300 300 0.1
fix fp projectile nvt temp 300 300 0.1
run 100000
unfix ft
unfix fp
velocity projectile add 0 0 -20 sum yes
fix fa all nve
run 200000
