# Initialization
units           metal
atom_style      atomic
boundary        p p p

# System Construction
lattice         fcc 4.05
region          box block 0 5 0 5 0 5
create_box      1 box
create_atoms    1 box

# Potential
pair_style      eam/alloy
pair_coeff * * /scratch/gilbreth/holbrooe/LAMMPS-AST/publication/potentials/prompt1.potential Al

# Miscellaneous
neighbor        2.0 bin
neigh_modify    every 1 delay 0 check yes

# Production Run
timestep        0.001
velocity        all create 300.0 123456 mom yes rot yes dist gaussian
fix             nptfix all npt temp 300.0 300.0 0.1 iso 1.01325 1.01325 1.0
thermo_style    custom step temp press pe ke etotal
thermo          100
run 10
