# Initialization
units           metal
dimension       3
boundary        p p p
atom_style      atomic

# System Construction
lattice         fcc 4.05
region          box block 0 5 0 5 0 5
create_box      1 box
create_atoms    1 box

# Potential
pair_style      eam
pair_coeff * * /scratch/gilbreth/holbrooe/LAMMPS-AST/publication/potentials/prompt1.potential Al

# Miscellaneous
timestep        0.001

# Production Run
thermo          100
thermo_style    custom step temp press pe ke etotal
fix             1 all npt temp 300.0 300.0 0.1 iso 1.01325 1.01325 1.0
run 10
