units metal
dimension 3
boundary p p p
atom_style atomic
newton on

lattice fcc 4.05
region box block 0 1 0 1 0 1 units lattice
create_box 1 box
create_atoms 1 box
replicate 5 5 5

pair_style eam/alloy
pair_coeff * * /scratch/gilbreth/holbrooe/LAMMPS-AST/publication/potentials/prompt1.potential Al

neighbor 2.0 bin
neigh_modify delay 0 every 1 check yes

timestep 0.005
thermo 100
thermo_style custom step temp press pe ke etotal vol

velocity all create 300.0 12345 mom yes rot no dist gaussian

fix 1 all npt temp 300.0 300.0 0.1 iso 1.01325 1.01325 1.0
run 10
unfix 1
