# Initialization
units metal
dimension 3
boundary p p p
atom_style atomic

# System Construction
lattice fcc 3.52
region box block 0 10 0 10 0 10
create_box 1 box
create_atoms 1 box
mass 1 58.6934

# Potential
pair_style eam
pair_coeff * * /scratch/gilbreth/holbrooe/LAMMPS-AST/publication/potentials/prompt2.potential

# Miscellaneous
velocity all create 600.0 4928459 dist gaussian
neighbor 2.0 bin
neigh_modify delay 0 every 1 check yes
timestep 0.001

# Production Run
fix 1 all npt temp 300.0 2500.0 0.1 iso 1.0 1.0 1.0
thermo 100
thermo_style custom step temp press pe ke etotal vol
run 10
