units metal
dimension 3
boundary p p p
atom_style atomic
atom_modify map array

lattice fcc 4.05
region cell block 0 1 0 1 0 1 units lattice
create_box 1 cell
create_atoms 1 box
replicate 5 5 5

mass 1 26.9815385

pair_style eam/alloy
pair_coeff * * ../../../potentials/prompt1.potential Al

neighbor 2.0 bin
neigh_modify every 1 delay 0 check yes

timestep 0.001
velocity all create 300.0 4928459 mom yes rot no dist gaussian

thermo 1000
thermo_style custom step time temp press pe ke etotal vol density lx ly lz
thermo_modify flush yes

fix equilibration all npt temp 300.0 300.0 0.1 iso 1.01325 1.01325 1.0

run 500000

unfix equilibration
