clear
units metal
dimension 3
boundary p p p
atom_style atomic
atom_modify map array
newton on

lattice fcc 3.52
region unitcell block 0 1 0 1 0 1 units lattice
create_box 1 unitcell
create_atoms 1 box
replicate 10 10 10
mass 1 58.6934

pair_style eam/alloy
pair_coeff * * ../../../potentials/prompt1.potential Ni

neighbor 2.0 bin
neigh_modify delay 0 every 1 check yes

timestep 0.001
reset_timestep 0

velocity all create 600.0 4928459 mom yes rot yes dist gaussian

thermo 1000
thermo_style custom step time temp press pe ke etotal enthalpy vol density lx ly lz
thermo_modify norm yes flush yes

fix 1 all npt temp 300.0 2500.0 0.1 iso 1.01325 1.01325 1.0

run 220000

unfix 1
write_data ni_melting_final.data
