units metal
dimension 3
boundary p p p
atom_style atomic
lattice fcc 3.52
region box block 0 10 0 10 0 10
create_box 1 box
create_atoms 1 box
pair_style eam
pair_coeff * * ../../../potentials/prompt1.potential Ni
neighbor 2 bin
neigh_modify delay 5
velocity all create 600 82382 mom yes rot yes dist gaussian
fix 1 all npt temp 300 2500 10 iso 1.01325 1.01325 1000
timestep 0.001
run 2200
