units metal
dimension 3
boundary p p s
atom_style atomic
neighbor 2 bin
neigh_modify delay 0 every 1 check yes
region whole block 0 66 0 66 0 213 units box
create_box 1 whole
lattice bcc 3.3
region target block 0 66 0 66 0 132 units box
region projectile block 0 66 0 66 147 213 units box
create_atoms 1 region target
create_atoms 1 region projectile
group target region target
group projectile region projectile
group all union target projectile
mass 1 92.906
pair_style eam/alloy
pair_coeff * * ../../../potentials/prompt1.potential Nb
timestep 0.001
thermo 1000
thermo_style custom step time temp etotal pe ke press
velocity all create 300 123456 mom yes rot yes dist gaussian
fix equil all nvt temp 300 300 0.1
run 100000
unfix equil
velocity projectile add 0 0 -20
fix impact all nve
dump dmp all custom 1000 dump.impact id type x y z vx vy vz
run 200000
