units metal
atom_style atomic
boundary p p f
lattice bcc 3.3 orient x 1 0 0 orient y 0 1 0 orient z 0 0 1
timestep 0.001
region simbox block 0 66 0 66 0 213 units box
create_box 1 simbox
region target block 0 66 0 66 0 132 units box
create_atoms 1 region target
region projectile block 0 66 0 66 147 213 units box
create_atoms 1 region projectile
group target region target
group projectile region projectile
pair_style eam/alloy
pair_coeff * * ../../../potentials/prompt1.potential Nb
neighbor 2 bin
neigh_modify delay 0 every 1 check yes
velocity all create 300 12345 mom yes rot yes dist gaussian
fix equil all nvt temp 300 300 0.1
thermo_style custom step temp etotal press
thermo 100
run 100000
unfix equil
velocity projectile add 0 0 -20 sum yes
fix impact all nve
run 200000
