# Initialization
units metal
dimension 3
boundary p p p
atom_style atomic

# System Construction
lattice fcc 4.05
region box block 0 5 0 5 0 5
create_box 1 box
create_atoms 1 box
mass 1 26.9815

# Potential
pair_style eam/alloy
pair_coeff * * /scratch/gilbreth/holbrooe/LAMMPS-AST/publication/potentials/prompt1.potential Al

# Miscellaneous
neighbor 2.0 bin
neigh_modify delay 10 check yes
timestep 0.001

# Production Run
velocity all create 300.0 4928459 dist gaussian
fix 1 all npt temp 300.0 300.0 0.1 iso 1.0 1.0 1.0
thermo 1000
thermo_style custom step temp press vol etotal
run 10
