units           metal
atom_style      atomic
boundary        p p p

lattice         fcc 4.05
region          box block 0 5 0 5 0 5
create_box      1 box
create_atoms    1 box

pair_style      eam/alloy
pair_coeff * * /scratch/gilbreth/holbrooe/LAMMPS-AST/publication/potentials/prompt1.potential Al

neighbor        2.0 bin
neigh_modify    delay 10 every 1 check yes

timestep        0.001

thermo          1000
thermo_style    custom step temp press pe ke etotal vol

fix             1 all npt temp 300 300 0.1 iso 1.01325 1.01325 1.0

run 10
