units metal
dimension 3
boundary p p p
atom_style atomic
timestep 0.001

lattice fcc 1.0
region unitcell block 0 1 0 1 0 1 units lattice
create_box 1 unitcell
create_atoms 1 unitcell
replicate 5 5 5
mass 1 26.9815

pair_style eam/alloy
pair_coeff * * /scratch/gilbreth/holbrooe/LAMMPS-AST/publication/potentials/prompt1.potential Al

neighbor 2.0 bin
neigh_modify delay 0 every 1 check yes
velocity all create 300 12345 mom yes dist gaussian
thermo 1000
thermo_style custom step temp press

fix 1 all npt temp 300 300 0.1 iso 1.01325 1.01325 1.0
run 10
