units           metal
dimension       3
boundary        p p p
atom_style      atomic

lattice         fcc 3.52
region          box block 0 10 0 10 0 10
create_box      1 box
create_atoms    1 box

mass            1 58.6934

pair_style      eam
pair_coeff * * /scratch/gilbreth/holbrooe/LAMMPS-AST/publication/potentials/prompt2.potential Ni

timestep        0.001

velocity        all create 600.0 12345 mom yes rot yes dist gaussian

fix             pbar all npt temp 300.0 2500.0 0.1 iso 1.01325 1.01325 1.0

run 10
