# Initialization
units metal
dimension 3
boundary p p f
atom_style atomic

# System Construction
lattice bcc 3.3008
region projectile block 0 20 0 20 0 20
create_box 1 projectile
create_atoms 1 region projectile
mass 1 92.90638

region target block 0 20 0 20 21.5 61.5
create_atoms 1 region target

# Potential
pair_style eam/alloy
pair_coeff * * /scratch/gilbreth/holbrooe/LAMMPS-AST/publication/potentials/prompt3.potential Nb

# Miscellaneous
timestep 0.001
thermo 1000
thermo_style custom step temp pe ke etotal press vol

# Production Run
velocity all create 300 12345
fix 1 all nvt temp 300 300 0.1
run 10
unfix 1

group projectile_atoms region projectile
velocity projectile_atoms set 0.0 0.0 20.0 sum yes

fix 2 all nve
run 10
